# Udregning af varmestrøm for Al til luift
b := 20
a := 25.5
d := 1
A_t := 93733.73
A_lam := a*b/10^6 = 0.00051
m := 315.8
λ_al := 229
δ := 0.5
c_pal := 0.896
c_luft := 0.001
β_luft := 3.2
υ := 18.88
η := 16.92
α := 27.4
a_tl := 21.8
t_lam := 80
t_luft := 20
Δt := t_lam - t_luft = 60
t_ref := (t_lam - t_luft)/2 = 30
Gr_L := 9.82*a^3*β_luft*Δt/υ^2 = 87706
Pr := 0.69
D := 4*(b*a)/(2*a + 2*b) = 22.4176
Re := c_luft*b/υ = 0.00105932
I_løb := 0.05*Re*D = 0.00118737
L_lam := a/1000
Ra := Gr_L*Pr = 60517.1  # hvilket tyder på laminar strømning
Nu := 3.66 + 0.0668*D/L_lam*Re*Pr/(1 + 0.004*(D/L_lam*Re*Pr)^(2/3)) = 3.7028
Φ := a_tl*A_lam*(t_lam - t_luft) = 0.66708
